# LAMMPS input script for Ethylene

# 1. Initialization
units           real
atom_style      full
boundary        p p p

# 2. Data Reading
read_data       data.ethylene

# 3. Force Field Settings (Simplified for demonstration)
# Bond styles: 1=Single, 2=Double
bond_style      harmonic
angle_style     harmonic
dihedral_style  none
improper_style  none
pair_style      lj/cut 10.0

# Coefficients
# pair_coeff    type1 type2 eps sigma
pair_coeff      * * 0.1 3.0  # Generic LJ for everything

# Bond Coeffs: type K r0
# User Params: C-C/Single=100, C=C=147.
# Targets: C-H=1.087 A, C=C=1.339 A
bond_coeff      1 100.0 1.087  # Type 1: Single Bond (C-H)
bond_coeff      2 147.0 1.339  # Type 2: Double Bond (C=C)
bond_coeff      3 800.0 1.20   # Type 3: Triple (unused)

# Angle Coeffs: type K theta0
# User Params: Angle Strength = 60.
# Targets: H-C-H = 117.5, H-C=C = 121.3
# Since we only defined ONE angle type in the converter, we have to pick one equilibrium angle.
# This is a limitation of our simple converter.
# We will use an average or the H-C=C value (121.3) as it is more common (4 vs 2).
angle_coeff     1 60.0 120.0   # Generic angle ~120 degrees

# Note: This is an approximation. In a real simulation, we'd distinguish C-H from C-C single bonds.
# But for "Hello World" to show it runs, this is sufficient.

# 4. Settings
neighbor        2.0 bin
neigh_modify    delay 0 every 1 check yes

# 5. Minimization
thermo          10
thermo_style    custom step temp pe ke etotal press vol
dump            1 all atom 10 dump.ethylene

minimize        1.0e-4 1.0e-6 100 1000

# 6. Dynamics (Making it move!)
undump          1
reset_timestep 0
velocity        all create 300.0 12345 dist gaussian
fix             1 all nve
run             1000
